# Paired benchmark: transformers_ace (TorchScript) vs transformers_ace/aot.
#
# Both runs start from the same equilibrated configuration with the same seed
# and integrate the same number of steps, so the comparison is like for like in
# both wall time and physics. Select the style with -var style and the model
# file with -var model, e.g.
#
#   lmp -in in.bench -var style aot -var model ../../../trace_h100.pt2
#   lmp -in in.bench -var style ts  -var model ../model.transformers_ace.pt

units           metal
atom_style      atomic
dimension       3
newton          on
boundary        p p p

read_data       ../test_lammps_cspbi3_mpi/data.NVT

mass            1 132.905   # Cs
mass            2 204.199   # Pb
mass            3 126.900   # I

if "${style} == aot" then &
  "pair_style  transformers_ace/aot" &
  "pair_coeff  * * ${model} Cs Pb I" &
else &
  "pair_style  transformers_ace" &
  "pair_coeff  * * ${model} Cs Pb I"

neighbor        1.0 bin
neigh_modify    delay 5 every 1

velocity        all create 400.0 1428 dist gaussian
fix             1 all nve
timestep        0.002

# Warm-up is excluded from the timing: it absorbs the first neighbour build,
# AOTI's lazy runner setup and any one-off allocator growth.
thermo          50
thermo_style    custom step temp pe ke etotal press
run             50

reset_timestep  0
run             200
